/prep7

! ----- Element and material
et,1,185

tb,user,1,,,2
tbdata,1,210000,0.3     ! E=210000 MPa, nu=0.3
mp,dens,1,7850

! ----- Geometry: unit cube
block,0,1,0,1,0,1
vmesh,all

! ----- Boundary conditions
nsel,s,loc,x,0
d,all,ux,0
d,all,uy,0
d,all,uz,0

nsel,s,loc,x,1
d,all,ux,0.001           ! 0.1% strain

allsel,all

/solu
antype,static
solve
finish

/post1
set,last
etab,sx,s,x
prtab,sx
